###################################################################
# This file is used to setup the indenter_mesh for the simulation #
###################################################################
valu indenterRotX 180
valu indenterRotY 0
valu indenterRotZ 180
valu indenterTraX -5.0000000745
valu indenterTraY -5.0000000745
valu indenterTraZ -10.62020
